# OpenSim document version 40000
ExternalLoads:
  datafile: C:\Users\Willi\ucloud\PhD\SegmentLength\3DGA\CP10\OSIM\BFND_W7.mot
  lowpass_cutoff_frequency_for_load_kinematics: 6
  ExternalForce [values shared by the 6 below unless stated]: force_expressed_in_body=ground
      point_expressed_in_body=ground
  ExternalForce grf_r_1: applied_to_body=calcn_r force_identifier=ground_force_1_v point_identifier=ground_force_1_p
      torque_identifier=ground_moment_1_m
  ExternalForce grf_r_2: applied_to_body=calcn_r force_identifier=ground_force_2_v point_identifier=ground_force_2_p
      torque_identifier=ground_moment_2_m
  ExternalForce grf_r_3: applied_to_body=calcn_r force_identifier=ground_force_3_v point_identifier=ground_force_3_p
      torque_identifier=ground_moment_3_m
  ExternalForce grf_l_1: applied_to_body=calcn_l force_identifier=ground_force_1_v point_identifier=ground_force_1_p
      torque_identifier=ground_moment_1_m
  ExternalForce grf_l_2: applied_to_body=calcn_l force_identifier=ground_force_2_v point_identifier=ground_force_2_p
      torque_identifier=ground_moment_2_m
  ExternalForce grf_l_3: applied_to_body=calcn_l force_identifier=ground_force_3_v point_identifier=ground_force_3_p
      torque_identifier=ground_moment_3_m
