# OpenSim document version 40000
InverseKinematicsTool:
  results_directory: ./
  constraint_weight: Inf
  accuracy: 1e-5
  marker_file: ../Callum_labeling/02_Hannah/Gait01/marker_experimental.trc
  time_range: 0 1.855
  report_errors: true
  output_motion_file: output/subject02/IK.mot
  report_marker_locations: false
  IKTaskSet:
    IKMarkerTask Sternum: apply=true weight=1
    IKMarkerTask C7: apply=true weight=1
    IKMarkerTask T10: apply=true weight=1
    IKMarkerTask Clav: apply=true weight=1
    IKMarkerTask Right_Back: apply=false weight=1
    IKMarkerTask RASI: apply=false weight=1
    IKMarkerTask LASI: apply=false weight=1
    IKMarkerTask PCL_CRAN: apply=true weight=10
    IKMarkerTask PCL_LINKS: apply=true weight=10
    IKMarkerTask PCL_RECHTS: apply=true weight=10
    IKMarkerTask LCL_UL_ANT: apply=true weight=10
    IKMarkerTask LCL_UL_CRAN: apply=true weight=10
    IKMarkerTask LCL_UL_POST: apply=true weight=10
    IKMarkerTask Left_Knee_LAT: apply=false weight=1
    IKMarkerTask Left_Knee_MED: apply=false weight=1
    IKMarkerTask LCL_LL_CRAN: apply=true weight=10
    IKMarkerTask LCL_LL_ANT: apply=true weight=10
    IKMarkerTask LCL_LL_POST: apply=true weight=10
    IKMarkerTask Left_Ankle_LAT: apply=false weight=1
    IKMarkerTask Left_Ankle_MED: apply=false weight=1
    IKMarkerTask Left_Heel: apply=true weight=10
    IKMarkerTask Left_M5: apply=true weight=10
    IKMarkerTask Left_Toe: apply=true weight=10
    IKMarkerTask RCL_UL_ANT: apply=true weight=10
    IKMarkerTask RCL_UL_CRAN: apply=true weight=10
    IKMarkerTask RCL_UL_POST: apply=true weight=10
    IKMarkerTask Right_Knee_LAT: apply=false weight=1
    IKMarkerTask Right_Knee_MED: apply=false weight=1
    IKMarkerTask RCL_LL_CRAN: apply=true weight=10
    IKMarkerTask RCL_LL_ANT: apply=true weight=10
    IKMarkerTask RCL_LL_POST: apply=true weight=10
    IKMarkerTask Right_Ankle_LAT: apply=false weight=1
    IKMarkerTask Right_Ankle_MED: apply=false weight=1
    IKMarkerTask Right_Heel: apply=true weight=10
    IKMarkerTask Right_M5: apply=true weight=10
    IKMarkerTask Right_Toe: apply=true weight=10
